! REV 2
!----------------------------------------------------------------------------------------------------------------------------
! OpenDSS script to control the running of the IEEE 4800-bus Distrubution Test Feeder
! Unbalanced Load Case
!----------------------------------------------------------------------------------------------------------------------------

! To execute, select one or more line and right-click, select Do Selected
!  1. Select from Compile through Solve and execute
!  2. Select one or more of the statements to display results and execute

!----------------------------------------------------------------------------------------------------------------------------

! Edit the path name to indicate the correct location of the Master file.

Compile (Master-unbal.dss)     ! unbalanced load master

New Energymeter.m1 Line.ln5815900-1 1
New Monitor.m1 Line.ln5815900-1 1

Set Maxiterations=20     ! Sometimes the solution takes more than the default 15 iterations

Solve
